a := 1.1234
Δa := 0.00001
b := 0.7658
Δb := 0.00001
n := 2
Δa + Δb = 2e-5
|a|*Δb + |b|*Δa = 1.8892e-5
(|a|*Δb + |b|*Δa)/b^2 = 3.22142e-5
(|b|*Δa + |a|*Δb)/a^2 = 1.49696e-5
n*a^(n - 1)*Δa = 2.2468e-5
n*b^(n - 1)*Δb = 1.5316e-5
