I := [0.16; 0.23; 0.30]
U := [4.1; 3.3; 3.1]
x := 0.2
L(a, i1, i2, i3) := U[i1]*((a - I[i2])*(a - I[i3]))/((I[i1] - I[i2])*(I[i1] - I[i3])) + U[i2]*((a - I[i1])*(a - I[i3]))/((I[i2] - I[i1])*(I[i2] - I[i3])) + U[i3]*((a - I[i1])*(a - I[i2]))/((I[i3] - I[i1])*(I[i3] - I[i2]))
L(x, 0, 1, 2) = 3.56939
