I := [0.16; 0.23; 0.30]
U := [4.1; 3.3; 3.1]
x := 0.2
U1(i1, i2) := (U[i2] - U[i1])/(I[i2] - I[i1])
U2(i1, i2, i3) := (U1(i1, i2) - U1(i1, i2))/(I[i3] - I[i1])
N(a, i1, i2, i3) := U[i1] + (a - I[i1])*U1(i1, i2) + (a - I[i1])*(a - I[i2])*U2(i1, i2, i3)
N(x, 0, 1, 2) = 3.64286
