i := 0 .. 1
I := [0.16; 0.23; 0.30]
U := [4.1; 3.3; 3.1]
h[i] := I[i + 1]*(-I[i])
h = [-0.0368; -0.069]
B := [0; 0]
C := [0; 0]
D := [0; 0]
Given
B[0]*h[0] + C[0]*h[0]^2 + D[0]*h[0]^3 == U[1] - U[0]
B[1]*h[1] + C[1]*h[1]^2 + D[1]*h[1]^3 == U[2] - U[1]
B[1] - B[0] - 2*C[0]*h[0] - 3*D[0]*h[0]^2 == 0
C[1] - C[0] - 3*D[0]*h[0] == 0
C[1] + 3*D[1]*h[1] == 0
C[0] == 0
[B; C; D] := Find(B, C, D)
B = [25.0158; 15.1859]
C = [0; 267.116]
D = [-2419.53; 1290.42]
i := 0 .. 1
S := U[i] + B[1]*(I - I[i]) + C[1]*(I - I[1])^2 + D[1]*(I - I[1])^3  # error: Значение должно быть целым числом.
d := cspline(I, U)
interp(d, I, U, 0.2) = 3.5344
