x := [1; 2; 3; 4; 5]
y := [1.05; 1.55; 1.7; 1.75; 1.8]
N := length(x) - 1
i := 0 .. N
a := slope(x, y)
a = 0.17
b := intercept(x, y)
b = 1.06
yLinear := a*x + b
yLinear = [1.23; 1.4; 1.57; 1.74; 1.91]
sum((y[i] - yLinear[i])^2, i) = 0.084
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