x := [1; 2; 3; 4; 5]
y := [1.05; 1.55; 1.7; 1.5; 1.8]
N := length(x) - 1
i := 0 .. N
m := slope(x, vectorize(ln(y)))
m = 0.10452
k := exp(intercept(x, vectorize(ln(y))))
k = 1.09267
yP(x) := k*exp(m*x)
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yP(x) = [1.21306; 1.34671; 1.49509; 1.65981; 1.84269]
sum((y[i] - yP(x)[i])^2, i) = 0.137266
