x := [1; 2; 3; 4; 5]
y := [1.05; 1.55; 1.7; 1.75; 1.8]
yK(x) := [1; x; x^2]
N := length(x) - 1
i := 0 .. N
a := linfit(x, y, yK)
yU(x) := a[2]*x^2 + a[1]*x + a[0]
a = [0.56; 0.598571; -0.0714286]
yU(x) = [1.08714; 1.47143; 1.71286; 1.81143; 1.76714]
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sum((y[i] - yU(x)[i])^2, i) = 0.0125714
