simpson(a, b, n, f) :=
    h ← (b - a)/n
    S1 ← 0
    for j ∈ 1 .. (n/2)
        x[2*j - 1] ← a + h*(2*j - 1)
        S1 ← S1 + f(x[2*j - 1])
    S2 ← 0
    for k ∈ 1 .. (n/2 - 1)
        x[2*k] ← a + h*2*k
        S2 ← S2 + f(x[2*k])
    S ← (4*S1 + 2*S2 + (f(a) + f(b)))
    S*h/3
f(x) := sqrt(sin(4*x))
simpson(0, π/4, 1000, f) = 0.599063
