f(x) := sqrt(sin(4*x))
t := 0, 0.0125 .. π/4
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a := π/4
b := π/8
N := 1000
i := 1 .. N
x[i] := rnd(a)
y[i] := rnd(b)
m[i] := if(y[i] < f(x[i]), 1, 0)
M := sum(m[i], i)
M = 969
S := M*a/N
S = 0.761051
