f(x) := 2*x^3 + x^2 - 4
dihot(a, b, e) :=
    k ← 0
    while 1
        c ← (a + b)/2
        b ← c if f(c)*f(a) < 0
        a ← c otherwise
        k ← k + 1
        break if |a - b| < e
    [c; k]
dihot(-5, 5, 0.001) = [1.11389; 14]
