f(x) := 2*x^3 + x^2 - 4
horda(a, b, e) :=
    k ← 0
    while 1
        c ← a - f(a)*(b - a)/(f(b) - f(a))
        b ← c if f(c)*f(a) < 0
        a ← c otherwise
        k ← k + 1
        break if |f(c)| < e
    [c; k]
horda(-5, 5, 0.001) = [1.11329; 76]
