A := [5, 0, 1; 1, 3, -2; -3, 2, 10]
b := [11; 2; 6]
P := augment(A, b)
R := rref(P)
R = [1, 0, 0, 1.98895; 0, 1, 0, 0.707182; 0, 0, 1, 1.05525]
n := cols(R)
x := R[:, n - 1]
x = [1.98895; 0.707182; 1.05525]
