A := [5, 0, 1; 1, 3, -2; -3, 2, 10]
b := [11; 2; 6]
t := 0.09
N := 45
|identity(3) - t*A| = 0.074251
x[:, 0] := [11; 2; 6]
D := A^0 - t*A
c := t*b
k := (0 .. N)
x[:, k + 1] := D*x[:, k] + c
Δx[k] := |x[:, k + 1] - x[:, k]|
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x[:, N + 1] = [1.98895; 0.707182; 1.05525]
