2*x + tg(x*y) = 0  # error: This variable is undefined.
F(x, y) := [2*x + tan(x*y); (y^2 - 6)^2 + ln(x)]
(y^2 - 6)^2 + ln(x) = 0  # error: This variable is undefined.
W(x, y) := [d/dx(2*x + tan(x*y)), d/dy(2*x + tan(x*y)); d/dx((y^2 - 6)^2 + ln(x)), d/dy((y^2 - 6)^2 + ln(x))]
x[:, 1] := [1; 2]
N := 10
k := 1 .. N
x[:, k + 1] := x[:, k] - W(x[:, k][0], x[:, k][1])^-1*F(x[:, k][0], x[:, k][1])
Δx[k] := |x[:, k + 1] - x[:, k]|
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x[:, N] = [0.879098; 2.37509]
F(x[:, N][0], x[:, N][1]) = [2.22045e-16; 8.32667e-17]
